y_a(x) := 2^(x^2)
f_2(x) := x*cos(x)^3
# [plot: y_a(x), f_2(x) vs x]
a := 0
b := 10
z := a, a + 3 .. b
h := 2
n := (b - a)/h
k := 0 .. n - 1
t[0] := a
t[k + 1] := t[k] + h
# [plot: y_a(x), y_a(z), y_a(t) vs x, z, t]
d/dx(y_a(x)) → x*ln(2)*2^(x^2 + 1)
d/dx(f_2(x)) → -(3*x*cos(x)^2*sin(x)) + cos(x)^3
integral(y_a(x), x) → -(sqrt(-π)*erf(x*sqrt(-ln(2))))/(2*sqrt(ln(2)))
integral(f_2(x), x) → ((3*x*cos(x)^2 + 6*x)*sin(x) + cos(x)^3 + 6*cos(x))/9
clear(z)
Y_a(x, z) := y_a(x) + f_2(z)
Y_a(x, z) → 2^(x^2) + z*cos(z)^3
# [3D plot: Y_a]
# [contour plot: Y_a]
