k := 1
n := 5
A := [
    10 + n, n/5, -2, n/6, 2;
    2*n, 20 + n, 3, 1, 3;
    3, n/4, 25, k/4, 0;
    -1, n, k, k/n, 2;
    2, k*n, 3, -5, 30
] = [15, 1, -2, 0.833333, 2; 10, 25, 3, 1, 3; 3, 1.25, 25, 0.25, 0; -1, 5, 1, 0.2, 2; 2, 5, 3, -5, 30]
B := [-10 + n/2; 15; -20; n/2; k + 5] = [-7.5; 15; -20; 2.5; 6]
D := augment(A, B)
det(A) = 129748
rank(A) = 5
rank(D) = 5
solve block
    # guess values
    x0 := [0; 0; 0; 0; 0]
    # constraints
    A*x0 == B
    # solver
    X_OB := find(x0) = [-0.287384; 1.10524; -0.768868; -5.19077; -0.753289]
end solve block
x_current := X_OB
ΔX := A*x_current - B = [0; 1.77636e-15; 3.55271e-15; -8.88178e-16; 3.55271e-15]
ΔX1 := |A*x_current - B| = 5.40258e-15
X_ls := lsolve(A, B) = [-0.287384; 1.10524; -0.768868; -5.19077; -0.753289]
x_current := X_ls
ΔX := A*x_current - B = [0; 0; 0; 1.33227e-15; 3.55271e-15]
ΔX1 := |A*x_current - B| = 3.7943e-15
X_m := A^-1*B = [-0.287384; 1.10524; -0.768868; -5.19077; -0.753289]
x_current := X_m
ΔX := A*x_current - B = [1.77636e-15; 7.10543e-15; 3.55271e-15; 8.88178e-16; 3.55271e-15]
ΔX1 := |A*x_current - B| = 8.92608e-15
i := 0 .. rows(A) - 1
j := 0 .. cols(A) - 1
K[i, j] := if(j == 0, B[i], A[i, j])
X_k[0] := det(K)/det(A) = -0.287384
K[i, j] := if(j == 1, B[i], A[i, j])
X_k[1] := det(K)/det(A) = 1.10524
K[i, j] := if(j == 2, B[i], A[i, j])
X_k[2] := det(K)/det(A) = -0.768868
K[i, j] := if(j == 3, B[i], A[i, j])
X_k[3] := det(K)/det(A) = -5.19077
X_k = [-0.287384; 1.10524; -0.768868; -5.19077]
K[i, j] := if(j == 4, B[i], A[i, j])
X_k[4] := det(K)/det(A) = -0.753289
x_current := X_k
ΔX := A*x_current - B = [5.32907e-15; 3.55271e-15; 3.55271e-15; 1.33227e-15; 1.06581e-14]
ΔX1 := |A*x_current - B| = 1.30005e-14
X_g := rref(D)[:, rank(D)] = [-0.287384; 1.10524; -0.768868; -5.19077; -0.753289]
x_current := X_g
ΔX := A*x_current - B = [1.77636e-15; 3.55271e-15; 0; 1.33227e-15; 7.10543e-15]
ΔX1 := |A*x_current - B| = 8.24859e-15
H[i, j] := if(i == j, 0, -A[i, j]/A[i, i])
g[i] := B[i]/A[i, i]
H = [
    0, -0.0666667, 0.133333, -0.0555556, -0.133333;
    -0.4, 0, -0.12, -0.04, -0.12;
    -0.12, -0.05, 0, -0.01, 0;
    5, -25, -5, 0, -10;
    -0.0666667, -0.166667, -0.1, 0.166667, 0
]
g = [-0.5; 0.6; -0.8; 12.5; 0.2]
norm1(H) = 25.2833
normi(H) = 45
norme(H) = 27.8446
X[:, 0] := g
N := 10000
k := 0 .. N - 1
X[:, k + 1] := H*X[:, k] + g
X = [
    -0.5, -1.36778, -0.783689, 0.597128, 0.551265, -0.734379;
    0.6, 0.372, 1.09891, 1.89539, 1.41096, 0.515335;
    -0.8, -0.895, -0.624467, -0.539597, -0.826867, -1.00038;
    12.5, -3, -22.1306, -13.9557, 6.36769, 8.39379;
    0.2, 2.29667, -0.181315, -3.55689, -2.4277, 1.07206
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]
x_current := X[:, N]
ΔX := A*x_current - B = [-2.13163e-14; -2.4869e-14; -3.55271e-15; 4.44089e-16; 1.13687e-13]
ΔX1 := |A*x_current - B| = 1.18365e-13
X[:, N] = [-0.287384; 1.10524; -0.768868; -5.19077; -0.753289]
