f(x) := x^3 - sin(x)
a := -2
b := 2
# [plot: f(x) vs x]
a1 := -1.2
b1 := -0.8
a2 := 0
a3 := 0.8
b3 := 1.2
z := a1
root(f(z), z) = -0.928626
z := a2
root(f(z), z) = 0
z := a3
root(f(z), z) = 0.928626
z1n := root(f(z), z) = 0.928626
f1(x) := x^3
f2(x) := sin(x)
Δz(w, q) := abs(w - q)
# [plot: f1(x), f2(x) vs x]
a := -2
b := 2
h := 0.4
n := (b - a)/h = 10
i := 0 .. n - 1
z[0] := a
z[i + 1] := z[i] + h
fx := augment(z, f(z))
transpose(fx) = [
    -2, -1.6, -1.2, -0.8, -0.4, 0, 0.4, 0.8, 1.2, 1.6, 2;
    -7.0907, -3.09643, -0.795961, 0.205356, 0.325418, 0, -0.325418, -0.205356, 0.795961, 3.09643, 7.0907
]
solve block
    # guess values
    z := a1
    # constraints
    f(z) == 0
    # solver
    z1 := find(z) = -0.928626
end solve block
solve block
    # guess values
    z := a2
    # constraints
    f(z) == 0
    # solver
    z2 := find(z) = 0
end solve block
solve block
    # guess values
    z := a3
    # constraints
    f(z) == 0
    # solver
    z3 := find(z) = 0.928626
end solve block
# Метод поділу навпіл
a[0] := a1 = -1.2
b[0] := b1 = -0.8
k := 0 .. 14
R(d, c) := if(f(d)*f(c) > 0, c, d)
[a[k + 1]; b[k + 1]] := [R(a[k], (a[k] + b[k])/2); R(b[k], (a[k] + b[k])/2)]
z := (a[last(a)] + b[last(b)])/2 = -0.928632
Δz(z, z1n) = 1.85726
# Метод Ньютона
a[0] := a1 = -1.2
b[0] := b1 = -0.8
df(x) := d/dx(f(x))
R(d, c) := if(f(d)*(d/dc(df(c))) > 0, d, c)
z[0] := R(a[0], b[0]) = -1.2
k := 0 .. 4
z[k + 1] := z[k] - f(z[k])/df(z[k])
z := z[last(z)] = -0.928626
Δz(z, z1n) = 1.85725
# Метод хорд
a[0] := a1 = -1.2
b[0] := b1 = -0.8
d2f(x) := d^2/dx^2(f(x))
R(d, c) := if(f(d)*d2f(c) > 0, c, d)
D(d, c) := if(f(d)*d2f(c) < 0, c, d)
z[0] := R(a[0], b[0]) = -0.8
a := D(a[0], b[0]) = -1.2
k := 0 .. 5
z[k + 1] := z[k] - (a - z[k])*f(z[k])/(f(a) - f(z[k]))
z := z[last(z)] = -0.928454
Δz(z, z1n) = 1.85708
a[6] := 3
a[5] := 3
a[4] := 3
a[3] := 3
a[2] := 3
a[1] := 3
a[0] := 3
n := length(a) = 7
f(d) := sum(a[i]*d^i, i = 0 .. n - 1)
# [plot: f(d) vs d]
z := polyroots(a) = [-0.900969 - 0.433884i; -0.900969 + 0.433884i; -0.222521 - 0.974928i; -0.222521 + 0.974928i; 0.62349 + 0.781831i; 0.62349 - 0.781831i]
f(z) = [-1.09451e-10 + 1.10362e-10i; 8.04365e-7 + 8.77783e-7i; 1.10515e-6 + 4.42281e-7i; -9.72843e-11 + 1.21991e-10i; 6.20371e-7 + 2.05393e-6i; -1.31884e-9 - 4.34188e-10i]
F(x, y) := x^x - 2^y
G(x, y) := log(y) - log(x)
f(x, y) := [F(x, y); G(x, y)]
# [3D plot: F]
# [3D plot: G]
# [3D plot: F, G]
solve block
    # guess values
    x0 := 1.5
    y0 := 0.5
    # constraints
    f(x0, y0) == 0
    # solver
    a := find(x0, y0) = [2; 2]
    f(a[0], a[1]) = [0; 0]
end solve block
J(x, y) := [d/dx(F(x, y)), d/dy(F(x, y)); d/dx(G(x, y)), d/dy(G(x, y))]
x[0] := 1.5
y[0] := 0.5
det(J(x[0], y[0])) = 1.95889
k := 0 .. 4
Δa(c, d) := -J(c, d)^-1*f(c, d)
[x[k + 1]; y[k + 1]] := [x[k] + Δa(x[k], y[k])[0]; y[k] + Δa(x[k], y[k])[1]]
x := x[last(x)] = 2
y := y[last(y)] = 2
f(x, y) = [2.12636e-7; 1.57047e-9]
