k := 1
ns := 5
x0 := 0
xn := 1.4
h := 0.2
n := (xn - x0)/h = 7
i := 0 .. n
x[i] := h*i
y[0] := ns/(3*k)
y[1] := ns/(2 + 0.4)
y[2] := ns/10 + 0.5
y[3] := 0.45
y[4] := 2 - ns/3
y[5] := -ns/5
y[6] := k - 3.4
y[7] := sqrt(ns*k)
j := 0 .. n - 1
xp[j] := h/2 + h*j
xp = [0.1; 0.3; 0.5; 0.7; 0.9; 1.1; 1.3]
x = [0; 0.2; 0.4; 0.6; 0.8; 1; 1.2; 1.4]
y = [1.66667; 2.08333; 1; 0.45; 0.333333; -1; -2.4; 2.23607]
# [plot: y vs x]
ylin(z) := linterp(x, y, z)
vectorize(ylin(x) - y) = [0; 0; 0; 0; 0; 0; 0; 4.44089e-16]
vectorize(ylin(xp)) = [1.875; 1.54167; 0.725; 0.391667; -0.333333; -1.7; -0.081966]
# [plot: y, ylin(z) vs x, z]
yL(z) := sum(y[i]*product(if(i == j, 1, (z - x[j])/(x[i] - x[j])), j = 0 .. n), i = 0 .. n)
vectorize(yL(x) - y) = [0; 0; 0; 0; 0; 0; 0; 0]
vectorize(yL(xp)) = [2.11552; 1.5972; 0.588467; 0.451442; -0.136983; -1.97301; -1.32907]
# [plot: y, yL(z) vs x, z]
yy := y
yy[n + 1] := y[n]
n := length(y)
a := transpose(yy)
k := 1 .. n - 1
d := 0 .. n - 1
a[k, d] := if(d ≥ (n - k), 0, a[k - 1, d + 1] - a[k - 1, d])
a = [
    1.66667, 2.08333, 1, 0.45, 0.333333, -1, -2.4, 2.23607, 2.23607;
    0.416667, -1.08333, -0.55, -0.116667, -1.33333, -1.4, 4.63607, 0, 0;
    -1.5, 0.533333, 0.433333, -1.21667, -0.0666667, 6.03607, 0, 0, 0;
    2.03333, -0.1, -1.65, 1.15, 6.10273, 0, 0, 0, 0;
    -2.13333, -1.55, 2.8, 4.95273, 0, 0, 0, 0, 0;
    0.583333, 4.35, 2.15273, 0, 0, 0, 0, 0, 0;
    3.76667, -2.19727, 0, 0, 0, 0, 0, 0, 0;
    -5.96393, 0, 0, 0, 0, 0, 0, 0, 0
]
a := a[:, 0] = [1.66667; 0.416667; -1.5; 2.03333; -2.13333; 0.583333; 3.76667; -5.96393]
yN(z) := a[0] + sum(a[i]/(i!*h^i)*product(z - x[k], k = 0 .. i - 1), i = 1 .. n - 1)
vectorize(yN(x) - y) = [0; 0; 0; -4.996e-16; -4.44089e-16; 2.22045e-16; -4.88498e-15; -1.77636e-14]
vectorize(yN(xp)) = [2.11552; 1.5972; 0.588467; 0.451442; -0.136983; -1.97301; -1.32907]
# [plot: y, yN(z) vs x, z]
yls(z) := interp(lspline(x, y), x, y, z)
vectorize(yls(x) - y) = [0; 0; 0; 0; 0; 0; 0; -4.44089e-16]
vectorize(yls(xp)) = [2.03542; 1.62292; 0.602071; 0.439628; -0.108498; -2.16605; -0.681124]
ycs(z) := interp(cspline(x, y), x, y, z)
vectorize(ycs(x) - y) = [0; 0; 0; 0; 0; 0; 0; -4.44089e-16]
vectorize(ycs(xp)) = [2.21649; 1.57518; 0.611964; 0.447798; -0.151073; -2.00392; -1.28706]
yps(z) := interp(pspline(x, y), x, y, z)
vectorize(yps(x) - y) = [0; 0; 0; 0; 0; 0; 0; 4.44089e-16]
vectorize(yps(xp)) = [2.12778; 1.59862; 0.606929; 0.444502; -0.132855; -2.0735; -1.02698]
# [plot: y, yls(z), ycs(z), yps(z) vs x, z]
