f(x) := sin(x) + x
a := 0
b := 10
n := 10
# [plot: f(x) vs x]
Sb := integral(f(x), x = a .. b) = 51.8391
ΔS(q) := |Sb - q|
δS(q) := ΔS(q)/Sb*100
h := (b - a)/n = 1
i := 0 .. n
z[i] := a + i*h
Spp := h*sum(f(z[i]), i = 1 .. n) = 56.4112
ΔS(Spp) = 4.57212
δS(Spp) = 8.81983
# [plot: f(z), f(z[i]) vs z, z[i] - h/2]
Slp := h*sum(f(z[i]), i = 0 .. n - 1) = 46.9552
ΔS(Slp) = 4.88386
δS(Slp) = 9.4212
k := 0 .. n - 1
# [plot: f(z), f(z[k]) vs z, z[k] + h/2]
Ssp := h*sum(f(z[i - 1] + h/2), i = 1 .. n) = 51.918
ΔS(Ssp) = 0.0789234
δS(Ssp) = 0.152247
# [plot: f(z), f(z[i]) vs z, z[i + 1] - h]
St := h*((f(z[0]) + f(z[n]))/2 + sum(f(z[i]), i = 1 .. n - 1)) = 51.6832
ΔS(St) = 0.155873
δS(St) = 0.300686
Ss := h/3*(f(z[0]) + f(z[n]) + 4*sum(f(z[2*i - 1]), i = 1 .. n/2) + 2*sum(f(z[2*(i - 1)]), i = 2 .. n/2)) = 51.8506
ΔS(Ss) = 0.0115756
δS(Ss) = 0.0223299
N := 10000
i := 1 .. N
z[i] := a + (b - a)*rnd(1)
Smc := (b - a)/N*sum(f(z[i]), i = 1 .. N) = 51.8292
ΔS(Smc) = 0.00990123
δS(Smc) = 0.0190999
