f(x, y) := ln(x*y)
a := 2
b := 10
N := 5
x[0] := 2
y[0] := 2*N
n := 80
h := (b - a)/n = 0.1
i := 1 .. n
[x[i]; y[i]] := [x[i - 1] + h; y[i - 1] + h*f(x[i - 1], y[i - 1])]
yE := y
# [plot: yE vs x]
k1(x, y) := h*f(x, y)
k2(x, y) := h*f(x + h/2, y + k1(x, y)/2)
k3(x, y) := h*f(x + h/2, y + k2(x, y)/2)
k4(x, y) := h*f(x + h, y + k3(x, y))
K(x, y) := k1(x, y) + 2*k2(x, y) + 2*k3(x, y) + k4(x, y)
[x[i]; y[i]] := [x[i - 1] + h; y[i - 1] + K(x[i - 1], y[i - 1])/6]
yRk := y
# [plot: yE, yRk vs x]
fpoch := y[0]
D(x, f) := ln(x*fpoch)
yRkf := rkfixed(fpoch, a, b, n, D)[:, 1]
yRka := Rkadapt(fpoch, a, b, n, D)[:, 1]
yB := Bulstoer(fpoch, a, b, n, D)[:, 1]
yR := Radau(fpoch, a, b, n, D)[:, 1]
# [plot: yE, yRk, yRkf, yRka, yB, yR vs x]
f(x, y, yd) := cos(3*x) - 4*y
a := 0
b := 2
x[0] := 0
y[0] := N
yd[0] := 2
n := 20
h := (b - a)/n = 0.1
i := 1 .. n
[x[i]; y[i]; yd[i]] := [x[i - 1] + h; y[i - 1] + h*yd[i - 1]; yd[i - 1] + h*f(x[i - 1], y[i - 1], yd[i - 1])]
yE := y
# [plot: yE vs x]
fpoch := [y[0]; yd[0]]
D(x, f) := [f[1]; cos(3*x) - 4*f[0]]
yRkf := rkfixed(fpoch, a, b, n, D)[:, 1]
yRka := Rkadapt(fpoch, a, b, n, D)[:, 1]
yB := Bulstoer(fpoch, a, b, n, D)[:, 1]
# [plot: yE, yRk, yRkf, yRka, yB, yR vs x]
yR := Radau(fpoch, a, b, n, D)[:, 1]
a := 2
b := 5
x[0] := 2
y[0] := N
yd[0] := 2
n := 30
h := (b - a)/n = 0.1
f1(x, y, yd) := x*cos(y + yd)
f2(x, y, yd) := sin(y - yd)
i := 1 .. n
[x[i]; y[i]; yd[i]] := [
    x[i - 1] + h;
    y[i - 1] + h*f1(x[i - 1], y[i - 1], yd[i - 1]);
    yd[i - 1] + h*f2(x[i - 1], y[i - 1], yd[i - 1])
]
yE := y
# [plot: yE vs x]
fpoch := [y[0]; yd[0]]
D(x, f) := [x*cos(f[0] + f[1]); sin(f[0] - f[1])]
yRkf := rkfixed(fpoch, a, b, n, D)[:, 1]
x := rkfixed(fpoch, a, b, n, D)[:, 0]
yRka := Rkadapt(fpoch, a, b, n, D)[:, 1]
yB := Bulstoer(fpoch, a, b, n, D)[:, 1]
yR := Radau(fpoch, a, b, n, D)[:, 1]
# [plot: yRkf, yRka, yB, yR vs x]
